9# -*- coding: utf-8 -*-

import Sofa

import SofaRuntime
SofaRuntime.importPlugin("SofaComponentAll")

# to add elements like Node or objects
import Sofa.Core
root = Sofa.Core.Node()
import math
import numpy as np
from scipy import signal

import os


path = os.path.dirname(os.path.abspath(__file__)) + '/mesh/'


class SpiderController(Sofa.Core.Controller):

	def __init__(self, *args, **kwargs):
		Sofa.Core.Controller.__init__(self,*args, **kwargs) #needed
		self.time = 0.0
		self.node = kwargs['node']
		self.pos_matrix = kwargs['pos_matrix']
		self.pos_filament = kwargs['pos_filament']

	def onAnimateBeginEvent(self,event):
		self.time = self.node.time.value

		#### at "zero" strain, force "0", filament length is "9.3", active matrix length is "37.5"

		# "from here "position Constraint below" can be used given the initial length and desired strain"
		#self.node.matrix.FF.force.value = [0,0,0]

		#### at "50%" strain,  force is "110000"
		self.node.matrix.FF.force.value = [0,400000,0]


		self.pos_filament= self.node.matrix.filament.l_filament.position.value
		self.pos_matrix= self.node.matrix.l_matrix.position.value

		self.file_matrix = open(path + 'pos_matrix.txt', 'w')
		self.file_filament = open(path + 'position_filament.txt', 'w')

        #print(self.pos_matrix, file= self.file_matrix)
        #print(self.pos_matrix, file= self.file_matrix)


		#print("filament is:", self.pos_filament)
		print("matrix is:", self.pos_matrix)


def createScene(rootNode):
    rootNode.addObject('RequiredPlugin', name='SoftRobots')
    rootNode.addObject('RequiredPlugin', name='SofaPython3')
    rootNode.addObject('RequiredPlugin', name='Sofa.Component.StateContainer')

    rootNode.addObject('RequiredPlugin', name='Sofa.Component.Constraint.Projective') # Needed to use components [FixedConstraint]
    rootNode.addObject('RequiredPlugin', name='Sofa.Component.Mapping.Linear') # Needed to use components [BarycentricMapping]

    rootNode.addObject('RequiredPlugin', name='Sofa.Component.MechanicalLoad') # Needed to use components [ConstantForceField]


    rootNode.addObject('RequiredPlugin', pluginName=[
        "Sofa.Component.AnimationLoop",  # Needed to use components FreeMotionAnimationLoop
        "Sofa.Component.Constraint.Lagrangian.Correction",
        # Needed to use components LinearSolverConstraintCorrection
        "Sofa.Component.Constraint.Lagrangian.Solver",  # Needed to use components GenericConstraintSolver
        "Sofa.Component.Engine.Select",  # Needed to use components BoxROI
        "Sofa.Component.IO.Mesh",  # Needed to use components MeshSTLLoader, MeshVTKLoader
        "Sofa.Component.LinearSolver.Direct",  # Needed to use components SparseLDLSolver
        "Sofa.Component.Mass",  # Needed to use components UniformMass
        "Sofa.Component.ODESolver.Backward",  # Needed to use components EulerImplicitSolver
        "Sofa.Component.Setting",  # Needed to use components BackgroundSetting
        "Sofa.Component.SolidMechanics.FEM.Elastic",  # Needed to use components TetrahedronFEMForceField
        "Sofa.Component.SolidMechanics.Spring",  # Needed to use components RestShapeSpringsForceField
        "Sofa.Component.Topology.Container.Constant",  # Needed to use components MeshTopology
        "Sofa.Component.Visual",  # Needed to use components VisualStyle
        "Sofa.GL.Component.Rendering3D",  # Needed to use components OglModel
    ])
    rootNode.addObject('VisualStyle', displayFlags="showVisualModels hideBehaviorModels hideCollisionModels \
                        hideBoundingCollisionModels hideForceFields showInteractionForceFields hideWireframe")

    rootNode.addObject('FreeMotionAnimationLoop')
    rootNode.addObject('DefaultVisualManagerLoop')

    rootNode.addObject('GenericConstraintSolver', maxIterations=1000, tolerance=1e-3)

    #rootNode.addObject('BackgroundSetting', color=[0, 0.168627, 0.211765, 1])
    rootNode.addObject('BackgroundSetting', color=[0, 0, 0, 0])
    #rootNode.findData('gravity').value = [0, 0, -981.0]
    rootNode.findData('gravity').value = [0, 0, -9.81]


    #rootNode.findData('dt').value = 0.01


    ##########################################
    # python script controller to control tensile force
    ##########################################

    #rootNode.createObject('PythonScriptController', classname="controller", filename="force_controller.py")


  ##########################################
    # FEM Model                              #
    ##########################################
    matrix = rootNode.addChild('matrix')
    matrix.addObject('EulerImplicitSolver', firstOrder=False, rayleighStiffness=0.2, rayleighMass=0.2)
    matrix.addObject('SparseLDLSolver')

    matrix.addObject('MeshVTKLoader', name='loader', filename=path + 'matrix.vtk', rotation=[0, 0, 0])
    matrix.addObject('MeshTopology', src='@loader')

    matrix.addObject('MechanicalObject', name='l_matrix', template='Vec3')
    matrix.addObject('UniformMass', totalMass=1)
    matrix.addObject('TetrahedronFEMForceField', template='Vec3', name='FEM', method='large', poissonRatio=0.4,
                        youngModulus=0.6e6)
    matrix.addObject('FixedConstraint', indices="465 475 487 590 594 637 638 740 477 675 818 975 1173 508 594 651 657 885 907 948 1149 1383 1446 543 666 920 1041 142 387 542 754 467 470 494 561 562 568 689 710 719 802 837 838 944 965 968 1059 1060 1066 1217 1300 1335 1442 1464")


    matrix.addObject('ConstantForceField',name='FF', indices= "725 806 974 599 627 911 1125 505 519 832 1003 520 541 662 1039 466 581 644 734 892 951 960 1232 1449 1458 1462 224 296 462 541 154 156 393 540 607 978 1014 1105 554 981 1052 1427 758 1096 1256 1430", force =[0, 0, 0], showArrowSize = "0.00003")

    matrix.addObject('LinearSolverConstraintCorrection')


   ############################  strain control ########################

   #matrix.addObject('PositionConstraint', indices= "725 806 974 599 627 911 1125 505 519 832 1003 520 541 662 1039 466 581 644 734 892 951 960 1232 1449 1458 1462 224 296 462 541 154 156 393 540",valueType="displacement", value=50, useDirections=[0, 1, 0])


     # matrix visualization
    ##########################################
    # In Sofa, visualization is handled by adding a rendering model.
    #  Create an empty child node to store this rendering model.
    matrixVisu = matrix.addChild('visu0')

    # Add to this empty node a rendering model made of triangles and loaded from a stl file.
    matrixVisu.addObject('MeshSTLLoader', filename=path + "matrix.stl", name="loader")
    matrixVisu.addObject('OglModel', src="@loader",  color=[0.9, 0.9, 0.9, 0.5])

    # Add a BarycentricMapping to deform the rendering model in a way that follow the ones of the parent mechanical model.
    matrixVisu.addObject('BarycentricMapping')

    ##########################################
    # filament                           #
    ##########################################
    #  This add a new node in the scene. This node is appended to the matrix's node.
    filament = matrix.addChild('filament')
    filament.addObject('EulerImplicitSolver', firstOrder=False, rayleighStiffness=0.2, rayleighMass=0.2)
    filament.addObject('SparseLDLSolver')
    #  This adds a MechanicalObject, a component holding the degree of freedom of our
    # mechanical modelling. In the case of a pneumatic actuation it is a set of positions describing the spider wall.
    filament.addObject('MeshVTKLoader', name='loader', filename=path + 'filament.vtk', rotation=[0, 0, 0])
    filament.addObject('MeshTopology', src='@loader', name='topo')
    filament.addObject('MechanicalObject', name='l_filament')
    filament.addObject('TetrahedronFEMForceField', template='Vec3', name='FEM', method='large', poissonRatio=0.4,
                        youngModulus=9e6)
    filament.addObject('UniformMass', totalMass=0.003)
    #filament.addObject('LinearSolverConstraintCorrection')


    # This adds a BarycentricMapping. A BarycentricMapping is a key element as it will add a bi-directional link
    #  between the spider wall (surfacic mesh) and the matrix (volumetric mesh) so that movements of the spider's DoFs will be mapped
    #  to the matrix and vice-versa;
    filament.addObject('BarycentricMapping', name='mapping', mapForces=False, mapMasses=False)
    filament.addObject(SpiderController(node=rootNode, pos_matrix = rootNode.matrix.l_matrix.position.value,  pos_filament = rootNode.matrix.filament.l_filament.position.value))

    ##########################################
    # filament Visualization                          #
    ##########################################
    filamentVisu = filament.addChild('visu1')
    filamentVisu.addObject('MeshSTLLoader', filename=path + "filament.stl", name="loader")
    filamentVisu.addObject('OglModel', src="@loader", color=[0.1, 0.1, 0.1, 0.9])
    filamentVisu.addObject('BarycentricMapping')

    return rootNode
